*Heading
** Job name: Merge-1 Model name: Job-1
** Generated by: Abaqus/CAE 6.14-4
*Preprint, echo=NO, model=NO, history=NO, contact=NO
** ----------------------------------------------------------------
**
** PART INSTANCE: PART-FLOOR-1
**
*Node
      1,         200.,         -10.,           0.
      2,         200.,          10.,           0.
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*Element, type=S4R
  1,   1,  23, 236,  46
  2,  23,  24, 237, 236
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*Nset, nset=PART-FLOOR-1__PICKEDSET20, generate
   1,  505,    1
*Elset, elset=PART-FLOOR-1__PICKEDSET20, generate
   1,  400,    1
** Section: Section-6-_PICKEDSET20
*Shell Section, elset=PART-FLOOR-1__PICKEDSET20, material=CONCRETE
1., 5
** ----------------------------------------------------------------
**
** PART INSTANCE: PART-PIER-2
**
*System
          0.,        -10.,       83.75,          1.,        -10.,       83.75
          0.,        -10.,       84.75
*Node
    506,           0.,      -133.75,           0.
    507,           0.,      -133.75,          10.
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*Element, type=C3D8R
401,  607,  934, 1211,  778,  506,  518,  774,  523
402,  934,  647,  856, 1211,  518,  507,  519,  774
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*Nset, nset=PART-PIER-2__PICKEDSET4, generate
 506, 1366,    1
*Elset, elset=PART-PIER-2__PICKEDSET4, generate
 401,  880,    1
** Section: Section-7-_PICKEDSET4
*Solid Section, elset=PART-PIER-2__PICKEDSET4, material=CONCRETE
,
** ----------------------------------------------------------------
**
** PART INSTANCE: PART-PIER-1
**
*System
          0.,         20.,       83.75,          1.,         20.,       83.75
          0.,         20.,       84.75
*Node
   1367,           0.,      -133.75,           0.
   1368,           0.,      -133.75,          10.
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*Element, type=C3D8R
 881, 1468, 1795, 2072, 1639, 1367, 1379, 1635, 1384
 882, 1795, 1508, 1717, 2072, 1379, 1368, 1380, 1635
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*Nset, nset=PART-PIER-1__PICKEDSET4, generate
1367, 2227,    1
*Elset, elset=PART-PIER-1__PICKEDSET4, generate
 881, 1360,    1
** Section: Section-7-_PICKEDSET4
*Solid Section, elset=PART-PIER-1__PICKEDSET4, material=CONCRETE
,
** ----------------------------------------------------------------
**
** PART INSTANCE: PART-RIVERBANK-1
**
*System
       -300.,          0.,        -50.,       -299.,          0.,        -50.
*Node
   2228,           0.,          10.,          20.
   2229,           0.,         -10.,          20.
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*Element, type=C3D8R
1361, 2289, 2464, 2617, 2374, 2228, 2240, 2344, 2255
1362, 2464, 2465, 2618, 2617, 2240, 2241, 2345, 2344
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*Nset, nset=PART-RIVERBANK-1__PICKEDSET2, generate
2228, 2832,    1
*Elset, elset=PART-RIVERBANK-1__PICKEDSET2, generate
1361, 1760,    1
** Section: Section-8-_PICKEDSET2
*Solid Section, elset=PART-RIVERBANK-1__PICKEDSET2, material=GRANITE
,
** ----------------------------------------------------------------
**
** PART INSTANCE: PART-RIVERBANK-2
**
*System
        250.,          0.,        -50.,        251.,          0.,        -50.
*Node
   2833,           0.,          10.,          20.
   2834,           0.,         -10.,          20.
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*Element, type=C3D8R
1761, 2894, 3069, 3222, 2979, 2833, 2845, 2949, 2860
1762, 3069, 3070, 3223, 3222, 2845, 2846, 2950, 2949
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*Nset, nset=PART-RIVERBANK-2__PICKEDSET2, generate
2833, 3437,    1
*Elset, elset=PART-RIVERBANK-2__PICKEDSET2, generate
1761, 2160,    1
** Section: Section-8-_PICKEDSET2
*Solid Section, elset=PART-RIVERBANK-2__PICKEDSET2, material=GRANITE
,
** ----------------------------------------------------------------
**
** PART INSTANCE: PART-SUPPORTBEAM-1
**
*System
          0.,        -10.,        -30.,          1.,        -10.,        -30.
          0.,        -10.,        -29.
*Node
   3438,        -200.,           0.,           0.
   3439,        -250.,           0.,           0.
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*Element, type=B31
2161, 3438, 3458
2162, 3458, 3459
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*Nset, nset=PART-SUPPORTBEAM-1__PICKEDSET2, generate
3438, 3780,    1
*Elset, elset=PART-SUPPORTBEAM-1__PICKEDSET2, generate
2161, 2512,    1
** Section: Section-9-_PICKEDSET2  Profile: Profile-1
*Beam Section, elset=PART-SUPPORTBEAM-1__PICKEDSET2, material=ALUMINUM, temperature=GRADIENTS, section=BOX
2., 2., 0.1, 0.1, 0.1, 0.1
0.,1.,-6.12323e-17
** ----------------------------------------------------------------
**
** PART INSTANCE: PART-SUPPORTBEAM-2
**
*System
          0.,         10.,        -30.,          1.,         10.,        -30.
          0.,         10.,        -29.
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*Elset, elset=PART-SUPPORTBEAM-2__PICKEDSET2, generate
2513, 2864,    1
** Section: Section-9-_PICKEDSET2  Profile: Profile-1
*Beam Section, elset=PART-SUPPORTBEAM-2__PICKEDSET2, material=ALUMINUM, temperature=GRADIENTS, section=BOX
2., 2., 0.1, 0.1, 0.1, 0.1
0.,1.,-6.12323e-17
** ----------------------------------------------------------------
**
** PART INSTANCE: PART-CABLE50-1
**
*System
          0.,        -10.,          0.,         -1.,        -10., -2.53632643278144e-17
 -2.53632643278146e-17,        -10.,          1.
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*Elset, elset=PART-CABLE50-1__PICKEDSET2
2865,
** Section: Section-1-_PICKEDSET2
*Solid Section, elset=PART-CABLE50-1__PICKEDSET2, material=STEEL
0.25,
** ----------------------------------------------------------------
**
** PART INSTANCE: PART-CABLE100-1
**
*System
          0.,        -10.,          0.,         -1.,        -10., -2.53632643278144e-17
 -2.53632643278146e-17,        -10.,          1.
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*Elset, elset=PART-CABLE100-1__PICKEDSET2
2866,
** Section: Section-2-_PICKEDSET2
*Solid Section, elset=PART-CABLE100-1__PICKEDSET2, material=STEEL
0.25,
** ----------------------------------------------------------------
**
** PART INSTANCE: PART-CABLE150-1
**
*System
          0.,        -10.,          0.,         -1.,        -10., -2.53632643278144e-17
 -2.53632643278146e-17,        -10.,          1.
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*Elset, elset=PART-CABLE150-1__PICKEDSET2
2867,
** Section: Section-3-_PICKEDSET2
*Solid Section, elset=PART-CABLE150-1__PICKEDSET2, material=STEEL
0.25,
** ----------------------------------------------------------------
**
** PART INSTANCE: PART-CABLE200-1
**
*System
          0.,        -10.,          0.,         -1.,        -10., -2.53632643278144e-17
 -2.53632643278146e-17,        -10.,          1.
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*Elset, elset=PART-CABLE200-1__PICKEDSET2
2868,
** Section: Section-4-_PICKEDSET2
*Solid Section, elset=PART-CABLE200-1__PICKEDSET2, material=STEEL
0.25,
** ----------------------------------------------------------------
**
** PART INSTANCE: PART-CABLE250-1
**
*System
          0.,        -10.,          0.,         -1.,        -10., -2.53632643278144e-17
 -2.53632643278146e-17,        -10.,          1.
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*Elset, elset=PART-CABLE250-1__PICKEDSET2
2869,
** Section: Section-5-_PICKEDSET2
*Solid Section, elset=PART-CABLE250-1__PICKEDSET2, material=STEEL
0.25,
** ----------------------------------------------------------------
**
** PART INSTANCE: PART-CABLE50-2
**
*System
          0.,         10.,          0.,         -1.,         10., -2.53632643278173e-17
 -2.53632643278134e-17,         10.,          1.
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*Elset, elset=PART-CABLE50-2__PICKEDSET2
2870,
** Section: Section-1-_PICKEDSET2
*Solid Section, elset=PART-CABLE50-2__PICKEDSET2, material=STEEL
0.25,
** ----------------------------------------------------------------
**
** PART INSTANCE: PART-CABLE100-2
**
*System
          0.,         10.,          0.,         -1.,         10., -2.53632643278173e-17
 -2.53632643278134e-17,         10.,          1.
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*Elset, elset=PART-CABLE100-2__PICKEDSET2
2871,
** Section: Section-2-_PICKEDSET2
*Solid Section, elset=PART-CABLE100-2__PICKEDSET2, material=STEEL
0.25,
** ----------------------------------------------------------------
**
** PART INSTANCE: PART-CABLE150-2
**
*System
          0.,         10.,          0.,         -1.,         10., -2.53632643278173e-17
 -2.53632643278134e-17,         10.,          1.
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*Elset, elset=PART-CABLE150-2__PICKEDSET2
2872,
** Section: Section-3-_PICKEDSET2
*Solid Section, elset=PART-CABLE150-2__PICKEDSET2, material=STEEL
0.25,
** ----------------------------------------------------------------
**
** PART INSTANCE: PART-CABLE200-2
**
*System
          0.,         10.,          0.,         -1.,         10., -2.53632643278173e-17
 -2.53632643278134e-17,         10.,          1.
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*Elset, elset=PART-CABLE200-2__PICKEDSET2
2873,
** Section: Section-4-_PICKEDSET2
*Solid Section, elset=PART-CABLE200-2__PICKEDSET2, material=STEEL
0.25,
** ----------------------------------------------------------------
**
** PART INSTANCE: PART-CABLE250-2
**
*System
          0.,         10.,          0.,         -1.,         10., -2.53632643278173e-17
 -2.53632643278134e-17,         10.,          1.
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*Elset, elset=PART-CABLE250-2__PICKEDSET2
2874,
** Section: Section-5-_PICKEDSET2
*Solid Section, elset=PART-CABLE250-2__PICKEDSET2, material=STEEL
0.25,
** ----------------------------------------------------------------
**
** PART INSTANCE: PART-CABLE50-3
**
*System
          0.,        -10.,          0.,          1.,        -10.,          0.
          0.,        -10.,          1.
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*Elset, elset=PART-CABLE50-3__PICKEDSET2
2875,
** Section: Section-1-_PICKEDSET2
*Solid Section, elset=PART-CABLE50-3__PICKEDSET2, material=STEEL
0.25,
** ----------------------------------------------------------------
**
** PART INSTANCE: PART-CABLE100-3
**
*System
          0.,        -10.,          0.,          1.,        -10.,          0.
          0.,        -10.,          1.
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*Elset, elset=PART-CABLE100-3__PICKEDSET2
2876,
** Section: Section-2-_PICKEDSET2
*Solid Section, elset=PART-CABLE100-3__PICKEDSET2, material=STEEL
0.25,
** ----------------------------------------------------------------
**
** PART INSTANCE: PART-CABLE150-3
**
*System
          0.,        -10.,          0.,          1.,        -10.,          0.
          0.,        -10.,          1.
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*Elset, elset=PART-CABLE150-3__PICKEDSET2
2877,
** Section: Section-3-_PICKEDSET2
*Solid Section, elset=PART-CABLE150-3__PICKEDSET2, material=STEEL
0.25,
** ----------------------------------------------------------------
**
** PART INSTANCE: PART-CABLE200-3
**
*System
          0.,        -10.,          0.,          1.,        -10.,          0.
          0.,        -10.,          1.
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*Elset, elset=PART-CABLE200-3__PICKEDSET2
2878,
** Section: Section-4-_PICKEDSET2
*Solid Section, elset=PART-CABLE200-3__PICKEDSET2, material=STEEL
0.25,
** ----------------------------------------------------------------
**
** PART INSTANCE: PART-CABLE250-3
**
*System
          0.,        -10.,          0.,          1.,        -10.,          0.
          0.,        -10.,          1.
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*Elset, elset=PART-CABLE250-3__PICKEDSET2
2879,
** Section: Section-5-_PICKEDSET2
*Solid Section, elset=PART-CABLE250-3__PICKEDSET2, material=STEEL
0.25,
** ----------------------------------------------------------------
**
** PART INSTANCE: PART-CABLE50-4
**
*System
          0.,         10.,          0.,          1.,         10.,          0.
          0.,         10.,          1.
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*Elset, elset=PART-CABLE50-4__PICKEDSET2
2880,
** Section: Section-1-_PICKEDSET2
*Solid Section, elset=PART-CABLE50-4__PICKEDSET2, material=STEEL
0.25,
** ----------------------------------------------------------------
**
** PART INSTANCE: PART-CABLE100-4
**
*System
          0.,         10.,          0.,          1.,         10.,          0.
          0.,         10.,          1.
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*Elset, elset=PART-CABLE100-4__PICKEDSET2
2881,
** Section: Section-2-_PICKEDSET2
*Solid Section, elset=PART-CABLE100-4__PICKEDSET2, material=STEEL
0.25,
** ----------------------------------------------------------------
**
** PART INSTANCE: PART-CABLE150-4
**
*System
          0.,         10.,          0.,          1.,         10.,          0.
          0.,         10.,          1.
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*Elset, elset=PART-CABLE150-4__PICKEDSET2
2882,
** Section: Section-3-_PICKEDSET2
*Solid Section, elset=PART-CABLE150-4__PICKEDSET2, material=STEEL
0.25,
** ----------------------------------------------------------------
**
** PART INSTANCE: PART-CABLE200-4
**
*System
          0.,         10.,          0.,          1.,         10.,          0.
          0.,         10.,          1.
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*Elset, elset=PART-CABLE200-4__PICKEDSET2
2883,
** Section: Section-4-_PICKEDSET2
*Solid Section, elset=PART-CABLE200-4__PICKEDSET2, material=STEEL
0.25,
** ----------------------------------------------------------------
**
** PART INSTANCE: PART-CABLE250-4
**
*System
          0.,         10.,          0.,          1.,         10.,          0.
          0.,         10.,          1.
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*Elset, elset=PART-CABLE250-4__PICKEDSET2
2884,
** Section: Section-5-_PICKEDSET2
*Solid Section, elset=PART-CABLE250-4__PICKEDSET2, material=STEEL
0.25,
*System
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*Nset, nset=SET-102
 506, 507, 508, 509, 514, 515
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*Nset, nset=SET-102
1367,1368,1369,1370,1375,1376
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*Nset, nset=SET-102
2841,2842,2843,2844,2916,2917
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*Nset, nset=SET-102
2236,2237,2238,2239,2311,2312
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*Nset, nset=M_SET-6_CNS_
 2,
*Nset, nset=M_SET-8_CNS_
 3,
*Nset, nset=M_SET-10_CNS_
 5,
*Nset, nset=M_SET-12_CNS_
 22,
*Nset, nset=M_SET-13_CNS_
 7,
*Nset, nset=M_SET-14_CNS_
 21,
*Nset, nset=M_SET-16_CNS_
 1,
*Nset, nset=M_SET-18_CNS_
 4,
*Nset, nset=M_SET-20_CNS_
 6,
*Nset, nset=M_SET-22_CNS_
 8,
*Nset, nset=M_SET-24_CNS_
 19,
*Nset, nset=M_SET-26_CNS_
 17,
*Nset, nset=M_SET-28_CNS_
 15,
*Nset, nset=M_SET-30_CNS_
 13,
*Nset, nset=M_SET-32_CNS_
 11,
*Nset, nset=M_SET-34_CNS_
 20,
*Nset, nset=M_SET-36_CNS_
 18,
*Nset, nset=M_SET-38_CNS_
 16,
*Nset, nset=M_SET-40_CNS_
 14,
*Nset, nset=M_SET-42_CNS_
 12,
*Nset, nset=M_SET-46_CNS_
 2,
*Nset, nset=M_SET-48_CNS_
 3,
*Nset, nset=M_SET-50_CNS_
 5,
*Nset, nset=M_SET-52_CNS_
 7,
*Nset, nset=M_SET-54_CNS_
 9,
*Nset, nset=M_SET-56_CNS_
 11,
*Nset, nset=M_SET-58_CNS_
 13,
*Nset, nset=M_SET-60_CNS_
 15,
*Nset, nset=M_SET-62_CNS_
 17,
*Nset, nset=M_SET-64_CNS_
 1,
*Nset, nset=M_SET-66_CNS_
 4,
*Nset, nset=M_SET-68_CNS_
 6,
*Nset, nset=M_SET-70_CNS_
 8,
*Nset, nset=M_SET-72_CNS_
 10,
*Nset, nset=M_SET-74_CNS_
 12,
*Nset, nset=M_SET-76_CNS_
 14,
*Nset, nset=M_SET-78_CNS_
 16,
*Nset, nset=M_SET-80_CNS_
 18,
*Nset, nset=M_SET-82_CNS_
2833,
*Nset, nset=M_SET-84_CNS_
2834,
*Nset, nset=M_SET-86_CNS_
2235,
*Nset, nset=M_SET-88_CNS_
2232,
*Nset, nset=M_SET-90_CNS_
2835,2836,2853,2854,2855
*Nset, nset=M_SET-92_CNS_
2233,2234,2264,2265,2266
*Nset, nset=M_SET-94_CNS_
513,
*Nset, nset=M_SET-96_CNS_
513,
*Nset, nset=M_SET-98_CNS_
1371,
*Nset, nset=M_SET-100_CNS_
1371,
*Nset, nset=S_SET-6_CNS_
4160,
*Nset, nset=S_SET-8_CNS_
4158,
*Nset, nset=S_SET-10_CNS_
4156,
*Nset, nset=S_SET-12_CNS_
4162,
*Nset, nset=S_SET-13_CNS_
4154,
*Nset, nset=S_SET-14_CNS_
4152,
*Nset, nset=S_SET-16_CNS_
4150,
*Nset, nset=S_SET-18_CNS_
4148,
*Nset, nset=S_SET-20_CNS_
4146,
*Nset, nset=S_SET-22_CNS_
4144,
*Nset, nset=S_SET-24_CNS_
4142,
*Nset, nset=S_SET-26_CNS_
4140,
*Nset, nset=S_SET-28_CNS_
4138,
*Nset, nset=S_SET-30_CNS_
4136,
*Nset, nset=S_SET-32_CNS_
4134,
*Nset, nset=S_SET-34_CNS_
4132,
*Nset, nset=S_SET-36_CNS_
4130,
*Nset, nset=S_SET-38_CNS_
4128,
*Nset, nset=S_SET-40_CNS_
4126,
*Nset, nset=S_SET-42_CNS_
4124,
*Nset, nset=S_SET-46_CNS_
3798,
*Nset, nset=S_SET-48_CNS_
3800,
*Nset, nset=S_SET-50_CNS_
3794,
*Nset, nset=S_SET-52_CNS_
3796,
*Nset, nset=S_SET-54_CNS_
3790,
*Nset, nset=S_SET-56_CNS_
3788,
*Nset, nset=S_SET-58_CNS_
3786,
*Nset, nset=S_SET-60_CNS_
3785,
*Nset, nset=S_SET-62_CNS_
3783,
*Nset, nset=S_SET-64_CNS_
3455,
*Nset, nset=S_SET-66_CNS_
3457,
*Nset, nset=S_SET-68_CNS_
3451,
*Nset, nset=S_SET-70_CNS_
3453,
*Nset, nset=S_SET-72_CNS_
3447,
*Nset, nset=S_SET-74_CNS_
3445,
*Nset, nset=S_SET-76_CNS_
3443,
*Nset, nset=S_SET-78_CNS_
3442,
*Nset, nset=S_SET-80_CNS_
3440,
*Nset, nset=S_SET-82_CNS_
3799,
*Nset, nset=S_SET-84_CNS_
3456,
*Nset, nset=S_SET-86_CNS_
3782,
*Nset, nset=S_SET-88_CNS_
3439,
*Nset, nset=S_SET-90_CNS_
  21,  22, 224, 225, 226
*Nset, nset=S_SET-92_CNS_
  19,  20, 203, 204, 205
*Nset, nset=S_SET-94_CNS_
4147,
*Nset, nset=S_SET-94_CNS_
4149,
*Nset, nset=S_SET-94_CNS_
4151,
*Nset, nset=S_SET-94_CNS_
4153,
*Nset, nset=S_SET-94_CNS_
4145,
*Nset, nset=S_SET-96_CNS_
4127,
*Nset, nset=S_SET-96_CNS_
4129,
*Nset, nset=S_SET-96_CNS_
4131,
*Nset, nset=S_SET-96_CNS_
4133,
*Nset, nset=S_SET-96_CNS_
4125,
*Nset, nset=S_SET-98_CNS_
4157,
*Nset, nset=S_SET-98_CNS_
4159,
*Nset, nset=S_SET-98_CNS_
4163,
*Nset, nset=S_SET-98_CNS_
4155,
*Nset, nset=S_SET-98_CNS_
4161,
*Nset, nset=S_SET-100_CNS_
4137,
*Nset, nset=S_SET-100_CNS_
4139,
*Nset, nset=S_SET-100_CNS_
4143,
*Nset, nset=S_SET-100_CNS_
4135,
*Nset, nset=S_SET-100_CNS_
4141,
*Surface, type=NODE, name=M_SET-6_CNS__CNS_
M_SET-6_CNS_, 1.
*Surface, type=NODE, name=S_SET-6_CNS__CNS_
S_SET-6_CNS_, 1.
*Surface, type=NODE, name=M_SET-8_CNS__CNS_
M_SET-8_CNS_, 1.
*Surface, type=NODE, name=S_SET-8_CNS__CNS_
S_SET-8_CNS_, 1.
*Surface, type=NODE, name=M_SET-10_CNS__CNS_
M_SET-10_CNS_, 1.
*Surface, type=NODE, name=S_SET-10_CNS__CNS_
S_SET-10_CNS_, 1.
*Surface, type=NODE, name=M_SET-12_CNS__CNS_
M_SET-12_CNS_, 1.
*Surface, type=NODE, name=S_SET-12_CNS__CNS_
S_SET-12_CNS_, 1.
*Surface, type=NODE, name=M_SET-13_CNS__CNS_
M_SET-13_CNS_, 1.
*Surface, type=NODE, name=S_SET-13_CNS__CNS_
S_SET-13_CNS_, 1.
*Surface, type=NODE, name=M_SET-14_CNS__CNS_
M_SET-14_CNS_, 1.
*Surface, type=NODE, name=S_SET-14_CNS__CNS_
S_SET-14_CNS_, 1.
*Surface, type=NODE, name=M_SET-16_CNS__CNS_
M_SET-16_CNS_, 1.
*Surface, type=NODE, name=S_SET-16_CNS__CNS_
S_SET-16_CNS_, 1.
*Surface, type=NODE, name=M_SET-18_CNS__CNS_
M_SET-18_CNS_, 1.
*Surface, type=NODE, name=S_SET-18_CNS__CNS_
S_SET-18_CNS_, 1.
*Surface, type=NODE, name=M_SET-20_CNS__CNS_
M_SET-20_CNS_, 1.
*Surface, type=NODE, name=S_SET-20_CNS__CNS_
S_SET-20_CNS_, 1.
*Surface, type=NODE, name=M_SET-22_CNS__CNS_
M_SET-22_CNS_, 1.
*Surface, type=NODE, name=S_SET-22_CNS__CNS_
S_SET-22_CNS_, 1.
*Surface, type=NODE, name=M_SET-24_CNS__CNS_
M_SET-24_CNS_, 1.
*Surface, type=NODE, name=S_SET-24_CNS__CNS_
S_SET-24_CNS_, 1.
*Surface, type=NODE, name=M_SET-26_CNS__CNS_
M_SET-26_CNS_, 1.
*Surface, type=NODE, name=S_SET-26_CNS__CNS_
S_SET-26_CNS_, 1.
*Surface, type=NODE, name=M_SET-28_CNS__CNS_
M_SET-28_CNS_, 1.
*Surface, type=NODE, name=S_SET-28_CNS__CNS_
S_SET-28_CNS_, 1.
*Surface, type=NODE, name=M_SET-30_CNS__CNS_
M_SET-30_CNS_, 1.
*Surface, type=NODE, name=S_SET-30_CNS__CNS_
S_SET-30_CNS_, 1.
*Surface, type=NODE, name=M_SET-32_CNS__CNS_
M_SET-32_CNS_, 1.
*Surface, type=NODE, name=S_SET-32_CNS__CNS_
S_SET-32_CNS_, 1.
*Surface, type=NODE, name=M_SET-34_CNS__CNS_
M_SET-34_CNS_, 1.
*Surface, type=NODE, name=S_SET-34_CNS__CNS_
S_SET-34_CNS_, 1.
*Surface, type=NODE, name=M_SET-36_CNS__CNS_
M_SET-36_CNS_, 1.
*Surface, type=NODE, name=S_SET-36_CNS__CNS_
S_SET-36_CNS_, 1.
*Surface, type=NODE, name=M_SET-38_CNS__CNS_
M_SET-38_CNS_, 1.
*Surface, type=NODE, name=S_SET-38_CNS__CNS_
S_SET-38_CNS_, 1.
*Surface, type=NODE, name=M_SET-40_CNS__CNS_
M_SET-40_CNS_, 1.
*Surface, type=NODE, name=S_SET-40_CNS__CNS_
S_SET-40_CNS_, 1.
*Surface, type=NODE, name=M_SET-42_CNS__CNS_
M_SET-42_CNS_, 1.
*Surface, type=NODE, name=S_SET-42_CNS__CNS_
S_SET-42_CNS_, 1.
*Surface, type=NODE, name=M_SET-46_CNS__CNS_
M_SET-46_CNS_, 1.
*Surface, type=NODE, name=S_SET-46_CNS__CNS_
S_SET-46_CNS_, 1.
*Surface, type=NODE, name=M_SET-48_CNS__CNS_
M_SET-48_CNS_, 1.
*Surface, type=NODE, name=S_SET-48_CNS__CNS_
S_SET-48_CNS_, 1.
*Surface, type=NODE, name=M_SET-50_CNS__CNS_
M_SET-50_CNS_, 1.
*Surface, type=NODE, name=S_SET-50_CNS__CNS_
S_SET-50_CNS_, 1.
*Surface, type=NODE, name=M_SET-52_CNS__CNS_
M_SET-52_CNS_, 1.
*Surface, type=NODE, name=S_SET-52_CNS__CNS_
S_SET-52_CNS_, 1.
*Surface, type=NODE, name=M_SET-54_CNS__CNS_
M_SET-54_CNS_, 1.
*Surface, type=NODE, name=S_SET-54_CNS__CNS_
S_SET-54_CNS_, 1.
*Surface, type=NODE, name=M_SET-56_CNS__CNS_
M_SET-56_CNS_, 1.
*Surface, type=NODE, name=S_SET-56_CNS__CNS_
S_SET-56_CNS_, 1.
*Surface, type=NODE, name=M_SET-58_CNS__CNS_
M_SET-58_CNS_, 1.
*Surface, type=NODE, name=S_SET-58_CNS__CNS_
S_SET-58_CNS_, 1.
*Surface, type=NODE, name=M_SET-60_CNS__CNS_
M_SET-60_CNS_, 1.
*Surface, type=NODE, name=S_SET-60_CNS__CNS_
S_SET-60_CNS_, 1.
*Surface, type=NODE, name=M_SET-62_CNS__CNS_
M_SET-62_CNS_, 1.
*Surface, type=NODE, name=S_SET-62_CNS__CNS_
S_SET-62_CNS_, 1.
*Surface, type=NODE, name=M_SET-64_CNS__CNS_
M_SET-64_CNS_, 1.
*Surface, type=NODE, name=S_SET-64_CNS__CNS_
S_SET-64_CNS_, 1.
*Surface, type=NODE, name=M_SET-66_CNS__CNS_
M_SET-66_CNS_, 1.
*Surface, type=NODE, name=S_SET-66_CNS__CNS_
S_SET-66_CNS_, 1.
*Surface, type=NODE, name=M_SET-68_CNS__CNS_
M_SET-68_CNS_, 1.
*Surface, type=NODE, name=S_SET-68_CNS__CNS_
S_SET-68_CNS_, 1.
*Surface, type=NODE, name=M_SET-70_CNS__CNS_
M_SET-70_CNS_, 1.
*Surface, type=NODE, name=S_SET-70_CNS__CNS_
S_SET-70_CNS_, 1.
*Surface, type=NODE, name=M_SET-72_CNS__CNS_
M_SET-72_CNS_, 1.
*Surface, type=NODE, name=S_SET-72_CNS__CNS_
S_SET-72_CNS_, 1.
*Surface, type=NODE, name=M_SET-74_CNS__CNS_
M_SET-74_CNS_, 1.
*Surface, type=NODE, name=S_SET-74_CNS__CNS_
S_SET-74_CNS_, 1.
*Surface, type=NODE, name=M_SET-76_CNS__CNS_
M_SET-76_CNS_, 1.
*Surface, type=NODE, name=S_SET-76_CNS__CNS_
S_SET-76_CNS_, 1.
*Surface, type=NODE, name=M_SET-78_CNS__CNS_
M_SET-78_CNS_, 1.
*Surface, type=NODE, name=S_SET-78_CNS__CNS_
S_SET-78_CNS_, 1.
*Surface, type=NODE, name=M_SET-80_CNS__CNS_
M_SET-80_CNS_, 1.
*Surface, type=NODE, name=S_SET-80_CNS__CNS_
S_SET-80_CNS_, 1.
*Surface, type=NODE, name=M_SET-82_CNS__CNS_
M_SET-82_CNS_, 1.
*Surface, type=NODE, name=S_SET-82_CNS__CNS_
S_SET-82_CNS_, 1.
*Surface, type=NODE, name=M_SET-84_CNS__CNS_
M_SET-84_CNS_, 1.
*Surface, type=NODE, name=S_SET-84_CNS__CNS_
S_SET-84_CNS_, 1.
*Surface, type=NODE, name=M_SET-86_CNS__CNS_
M_SET-86_CNS_, 1.
*Surface, type=NODE, name=S_SET-86_CNS__CNS_
S_SET-86_CNS_, 1.
*Surface, type=NODE, name=M_SET-88_CNS__CNS_
M_SET-88_CNS_, 1.
*Surface, type=NODE, name=S_SET-88_CNS__CNS_
S_SET-88_CNS_, 1.
*Surface, type=NODE, name=M_SET-90_CNS__CNS_
M_SET-90_CNS_, 1.
*Surface, type=NODE, name=S_SET-90_CNS__CNS_
S_SET-90_CNS_, 1.
*Surface, type=NODE, name=M_SET-92_CNS__CNS_
M_SET-92_CNS_, 1.
*Surface, type=NODE, name=S_SET-92_CNS__CNS_
S_SET-92_CNS_, 1.
*Surface, type=NODE, name=M_SET-94_CNS__CNS_
M_SET-94_CNS_, 1.
*Surface, type=NODE, name=S_SET-94_CNS__CNS_
S_SET-94_CNS_, 1.
*Surface, type=NODE, name=M_SET-96_CNS__CNS_
M_SET-96_CNS_, 1.
*Surface, type=NODE, name=S_SET-96_CNS__CNS_
S_SET-96_CNS_, 1.
*Surface, type=NODE, name=M_SET-98_CNS__CNS_
M_SET-98_CNS_, 1.
*Surface, type=NODE, name=S_SET-98_CNS__CNS_
S_SET-98_CNS_, 1.
*Surface, type=NODE, name=M_SET-100_CNS__CNS_
M_SET-100_CNS_, 1.
*Surface, type=NODE, name=S_SET-100_CNS__CNS_
S_SET-100_CNS_, 1.
** Constraint: CONSTRAINT-2-1
*Tie, name=CONSTRAINT-2-1, adjust=yes, no rotation
S_SET-6_CNS__CNS_, M_SET-6_CNS__CNS_
** Constraint: CONSTRAINT-3-1
*Tie, name=CONSTRAINT-3-1, adjust=yes, no rotation
S_SET-8_CNS__CNS_, M_SET-8_CNS__CNS_
** Constraint: CONSTRAINT-4-1
*Tie, name=CONSTRAINT-4-1, adjust=yes, no rotation
S_SET-10_CNS__CNS_, M_SET-10_CNS__CNS_
** Constraint: CONSTRAINT-5-1
*Tie, name=CONSTRAINT-5-1, adjust=yes, no rotation
S_SET-12_CNS__CNS_, M_SET-12_CNS__CNS_
** Constraint: CONSTRAINT-6-1
*Tie, name=CONSTRAINT-6-1, adjust=yes, no rotation
S_SET-13_CNS__CNS_, M_SET-13_CNS__CNS_
** Constraint: CONSTRAINT-7-1
*Tie, name=CONSTRAINT-7-1, adjust=yes
S_SET-14_CNS__CNS_, M_SET-14_CNS__CNS_
** Constraint: CONSTRAINT-8-1
*Tie, name=CONSTRAINT-8-1, adjust=yes
S_SET-16_CNS__CNS_, M_SET-16_CNS__CNS_
** Constraint: CONSTRAINT-9-1
*Tie, name=CONSTRAINT-9-1, adjust=no
S_SET-18_CNS__CNS_, M_SET-18_CNS__CNS_
** Constraint: CONSTRAINT-10-1
*Tie, name=CONSTRAINT-10-1, adjust=yes, no rotation
S_SET-20_CNS__CNS_, M_SET-20_CNS__CNS_
** Constraint: CONSTRAINT-11-1
*Tie, name=CONSTRAINT-11-1, adjust=yes, no rotation
S_SET-22_CNS__CNS_, M_SET-22_CNS__CNS_
** Constraint: CONSTRAINT-12-1
*Tie, name=CONSTRAINT-12-1, adjust=yes, no rotation
S_SET-24_CNS__CNS_, M_SET-24_CNS__CNS_
** Constraint: CONSTRAINT-13-1
*Tie, name=CONSTRAINT-13-1, adjust=yes, no rotation
S_SET-26_CNS__CNS_, M_SET-26_CNS__CNS_
** Constraint: CONSTRAINT-14-1
*Tie, name=CONSTRAINT-14-1, adjust=yes, no rotation
S_SET-28_CNS__CNS_, M_SET-28_CNS__CNS_
** Constraint: CONSTRAINT-15-1
*Tie, name=CONSTRAINT-15-1, adjust=yes, no rotation
S_SET-30_CNS__CNS_, M_SET-30_CNS__CNS_
** Constraint: CONSTRAINT-16-1
*Tie, name=CONSTRAINT-16-1, adjust=yes, no rotation
S_SET-32_CNS__CNS_, M_SET-32_CNS__CNS_
** Constraint: CONSTRAINT-17-1
*Tie, name=CONSTRAINT-17-1, adjust=yes, no rotation
S_SET-34_CNS__CNS_, M_SET-34_CNS__CNS_
** Constraint: CONSTRAINT-18-1
*Tie, name=CONSTRAINT-18-1, adjust=yes, no rotation
S_SET-36_CNS__CNS_, M_SET-36_CNS__CNS_
** Constraint: CONSTRAINT-19-1
*Tie, name=CONSTRAINT-19-1, adjust=yes, no rotation
S_SET-38_CNS__CNS_, M_SET-38_CNS__CNS_
** Constraint: CONSTRAINT-20-1
*Tie, name=CONSTRAINT-20-1, adjust=yes, no rotation
S_SET-40_CNS__CNS_, M_SET-40_CNS__CNS_
** Constraint: CONSTRAINT-21-1
*Tie, name=CONSTRAINT-21-1, adjust=yes, no rotation
S_SET-42_CNS__CNS_, M_SET-42_CNS__CNS_
** Constraint: CONSTRAINT-22-1
*Tie, name=CONSTRAINT-22-1, adjust=yes, no rotation
S_SET-46_CNS__CNS_, M_SET-46_CNS__CNS_
** Constraint: CONSTRAINT-23-1
*Tie, name=CONSTRAINT-23-1, adjust=yes, no rotation
S_SET-48_CNS__CNS_, M_SET-48_CNS__CNS_
** Constraint: CONSTRAINT-24-1
*Tie, name=CONSTRAINT-24-1, adjust=yes, no rotation
S_SET-50_CNS__CNS_, M_SET-50_CNS__CNS_
** Constraint: CONSTRAINT-25-1
*Tie, name=CONSTRAINT-25-1, adjust=yes, no rotation
S_SET-52_CNS__CNS_, M_SET-52_CNS__CNS_
** Constraint: CONSTRAINT-26-1
*Tie, name=CONSTRAINT-26-1, adjust=yes, no rotation
S_SET-54_CNS__CNS_, M_SET-54_CNS__CNS_
** Constraint: CONSTRAINT-27-1
*Tie, name=CONSTRAINT-27-1, adjust=yes, no rotation
S_SET-56_CNS__CNS_, M_SET-56_CNS__CNS_
** Constraint: CONSTRAINT-28-1
*Tie, name=CONSTRAINT-28-1, adjust=yes, no rotation
S_SET-58_CNS__CNS_, M_SET-58_CNS__CNS_
** Constraint: CONSTRAINT-29-1
*Tie, name=CONSTRAINT-29-1, adjust=yes, no rotation
S_SET-60_CNS__CNS_, M_SET-60_CNS__CNS_
** Constraint: CONSTRAINT-30-1
*Tie, name=CONSTRAINT-30-1, adjust=yes, no rotation
S_SET-62_CNS__CNS_, M_SET-62_CNS__CNS_
** Constraint: CONSTRAINT-31-1
*Tie, name=CONSTRAINT-31-1, adjust=yes, no rotation
S_SET-64_CNS__CNS_, M_SET-64_CNS__CNS_
** Constraint: CONSTRAINT-32-1
*Tie, name=CONSTRAINT-32-1, adjust=yes, no rotation
S_SET-66_CNS__CNS_, M_SET-66_CNS__CNS_
** Constraint: CONSTRAINT-33-1
*Tie, name=CONSTRAINT-33-1, adjust=yes, no rotation
S_SET-68_CNS__CNS_, M_SET-68_CNS__CNS_
** Constraint: CONSTRAINT-34-1
*Tie, name=CONSTRAINT-34-1, adjust=yes, no rotation
S_SET-70_CNS__CNS_, M_SET-70_CNS__CNS_
** Constraint: CONSTRAINT-35-1
*Tie, name=CONSTRAINT-35-1, adjust=yes, no rotation
S_SET-72_CNS__CNS_, M_SET-72_CNS__CNS_
** Constraint: CONSTRAINT-36-1
*Tie, name=CONSTRAINT-36-1, adjust=yes, no rotation
S_SET-74_CNS__CNS_, M_SET-74_CNS__CNS_
** Constraint: CONSTRAINT-37-1
*Tie, name=CONSTRAINT-37-1, adjust=yes, no rotation
S_SET-76_CNS__CNS_, M_SET-76_CNS__CNS_
** Constraint: CONSTRAINT-38-1
*Tie, name=CONSTRAINT-38-1, adjust=yes, no rotation
S_SET-78_CNS__CNS_, M_SET-78_CNS__CNS_
** Constraint: CONSTRAINT-39-1
*Tie, name=CONSTRAINT-39-1, adjust=yes, no rotation
S_SET-80_CNS__CNS_, M_SET-80_CNS__CNS_
** Constraint: CONSTRAINT-40-1
*Tie, name=CONSTRAINT-40-1, adjust=yes, no rotation
S_SET-82_CNS__CNS_, M_SET-82_CNS__CNS_
** Constraint: CONSTRAINT-41-1
*Tie, name=CONSTRAINT-41-1, adjust=yes, no rotation
S_SET-84_CNS__CNS_, M_SET-84_CNS__CNS_
** Constraint: CONSTRAINT-42-1
*Tie, name=CONSTRAINT-42-1, adjust=yes, no rotation
S_SET-86_CNS__CNS_, M_SET-86_CNS__CNS_
** Constraint: CONSTRAINT-43-1
*Tie, name=CONSTRAINT-43-1, adjust=yes, no rotation
S_SET-88_CNS__CNS_, M_SET-88_CNS__CNS_
** Constraint: CONSTRAINT-44-1
*Tie, name=CONSTRAINT-44-1, adjust=yes, no rotation
S_SET-90_CNS__CNS_, M_SET-90_CNS__CNS_
** Constraint: CONSTRAINT-45-1
*Tie, name=CONSTRAINT-45-1, adjust=yes, no rotation
S_SET-92_CNS__CNS_, M_SET-92_CNS__CNS_
** Constraint: CONSTRAINT-46-1
*Tie, name=CONSTRAINT-46-1, adjust=yes, no rotation
S_SET-94_CNS__CNS_, M_SET-94_CNS__CNS_
** Constraint: CONSTRAINT-47-1
*Tie, name=CONSTRAINT-47-1, adjust=yes, no rotation
S_SET-96_CNS__CNS_, M_SET-96_CNS__CNS_
** Constraint: CONSTRAINT-48-1
*Tie, name=CONSTRAINT-48-1, adjust=yes, no rotation
S_SET-98_CNS__CNS_, M_SET-98_CNS__CNS_
** Constraint: CONSTRAINT-49-1
*Tie, name=CONSTRAINT-49-1, adjust=yes, no rotation
S_SET-100_CNS__CNS_, M_SET-100_CNS__CNS_
**
** MATERIALS
**
**  For the SupportBeam
*Material, name=ALUMINUM
*Density
2710.,
*Elastic
 7e+10, 0.346
**  For the Pier and the Floor
*Material, name=CONCRETE
*Density
2320.,
*Elastic
 2.5e+10, 0.3
**  For the RiverBank
*Material, name=GRANITE
*Density
2770.,
*Elastic
 6e+10, 0.27
**  For the Cable
*Material, name=STEEL
*Density
7860.,
*Elastic
 1.17e+11, 0.266
** ----------------------------------------------------------------
**
** STEP: Step-1
**
*Step, name=Step-1, nlgeom=NO
*Static
1., 1., 1e-05, 1.
**
** BOUNDARY CONDITIONS
**
** Name: Disp-BC-1 Type: 位移/转角
*Boundary
SET-102, 1, 1
** Name: Disp-BC-2 Type: 位移/转角
*Boundary
SET-102, 2, 2
** Name: Disp-BC-3 Type: 位移/转角
*Boundary
SET-102, 3, 3
**
** LOADS
**
** Name: GRAVITY-1   Type: Gravity
*Dload
, GRAV, 10., 0., 0., -1.
**
** OUTPUT REQUESTS
**
*Restart, write, frequency=0
**
** FIELD OUTPUT: F-Output-1
**
*Output, field, variable=PRESELECT
**
** HISTORY OUTPUT: H-Output-1
**
*Output, history, variable=PRESELECT
*End Step
