*Heading
** Job name: Merge-11 Model name: Job-1
** Generated by: Abaqus/CAE 6.14-4
*Preprint, echo=NO, model=NO, history=NO, contact=NO
** ----------------------------------------------------------------
**
** PART INSTANCE: Part-1-1
**
*Node
      1,        -300.,         -10.,         -30.
      2,        -250.,         -10.,         -30.
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*Element, type=S4R
  1, 3462, 3605, 3217, 3181
  2, 3605, 3813, 3239, 3217
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*Element, type=B31
2161,  703,   78
2162,   78,   79
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*Element, type=T3D2
2865, 1250, 2462
2866, 1251, 2462
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*Element, type=C3D8R
401, 2248, 1931,  969, 1194, 2241, 1915,  949, 1187
402, 1931, 1916,  951,  969, 1915, 1913,  940,  949
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*Nset, nset=Part-1-1__PICKEDSET20_#1
   96,   97,   98,   99,  100,  101
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*Elset, elset=Part-1-1__PICKEDSET20_#1, generate
   1,  400,    1
*Nset, nset=Part-1-1__PICKEDSET4_#2
  939,  940,  941,  942,  943,  944
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*Elset, elset=Part-1-1__PICKEDSET4_#2, generate
 401,  880,    1
*Nset, nset=Part-1-1__PICKEDSET4_#3
 1456, 1457, 1458, 1459, 1460, 1461
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*Elset, elset=Part-1-1__PICKEDSET4_#3, generate
  881,  1360,     1
*Nset, nset=Part-1-1__PICKEDSET2_#4
   1,   2,   3,   4,   5,   6
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*Elset, elset=Part-1-1__PICKEDSET2_#4, generate
 1361,  1760,     1
*Nset, nset=Part-1-1__PICKEDSET2_#5
 3363, 3364, 3365, 3366, 3367, 3368
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*Elset, elset=Part-1-1__PICKEDSET2_#5, generate
 1761,  2160,     1
*Nset, nset=Part-1-1__PICKEDSET2_#6
    2,   78,   79,   80,   81,   82
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*Elset, elset=Part-1-1__PICKEDSET2_#6, generate
 2161,  2512,     1
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*Elset, elset=Part-1-1__PICKEDSET2_#8
 2865,
*Nset, nset=Part-1-1__PICKEDSET2_#9
 1251, 2462
*Elset, elset=Part-1-1__PICKEDSET2_#9
 2866,
*Nset, nset=Part-1-1__PICKEDSET2_#10
  747, 2462
*Elset, elset=Part-1-1__PICKEDSET2_#10
 2867,
*Nset, nset=Part-1-1__PICKEDSET2_#11
  748, 2462
*Elset, elset=Part-1-1__PICKEDSET2_#11
 2868,
*Nset, nset=Part-1-1__PICKEDSET2_#12
   96, 2462
*Elset, elset=Part-1-1__PICKEDSET2_#12
 2869,
*Nset, nset=Part-1-1__PICKEDSET2_#13
 1521, 2771
*Elset, elset=Part-1-1__PICKEDSET2_#13
 2870,
*Nset, nset=Part-1-1__PICKEDSET2_#14
 1522, 2771
*Elset, elset=Part-1-1__PICKEDSET2_#14
 2871,
*Nset, nset=Part-1-1__PICKEDSET2_#15
  895, 2771
*Elset, elset=Part-1-1__PICKEDSET2_#15
 2872,
*Nset, nset=Part-1-1__PICKEDSET2_#16
  896, 2771
*Elset, elset=Part-1-1__PICKEDSET2_#16
 2873,
*Nset, nset=Part-1-1__PICKEDSET2_#17
  642, 2771
*Elset, elset=Part-1-1__PICKEDSET2_#17
 2874,
*Nset, nset=Part-1-1__PICKEDSET2_#18
 2312, 2462
*Elset, elset=Part-1-1__PICKEDSET2_#18
 2875,
*Nset, nset=Part-1-1__PICKEDSET2_#19
 2462, 3172
*Elset, elset=Part-1-1__PICKEDSET2_#19
 2876,
*Nset, nset=Part-1-1__PICKEDSET2_#20
 2462, 3171
*Elset, elset=Part-1-1__PICKEDSET2_#20
 2877,
*Nset, nset=Part-1-1__PICKEDSET2_#21
 2462, 3462
*Elset, elset=Part-1-1__PICKEDSET2_#21
 2878,
*Nset, nset=Part-1-1__PICKEDSET2_#22
 2462, 3463
*Elset, elset=Part-1-1__PICKEDSET2_#22
 2879,
*Nset, nset=Part-1-1__PICKEDSET2_#23
 2621, 2771
*Elset, elset=Part-1-1__PICKEDSET2_#23
 2880,
*Nset, nset=Part-1-1__PICKEDSET2_#24
 2771, 3320
*Elset, elset=Part-1-1__PICKEDSET2_#24
 2881,
*Nset, nset=Part-1-1__PICKEDSET2_#25
 2771, 3319
*Elset, elset=Part-1-1__PICKEDSET2_#25
 2882,
*Nset, nset=Part-1-1__PICKEDSET2_#26
 2771, 4020
*Elset, elset=Part-1-1__PICKEDSET2_#26
 2883,
*Nset, nset=Part-1-1__PICKEDSET2_#27
 2771, 4021
*Elset, elset=Part-1-1__PICKEDSET2_#27
 2884,
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** Section: Section-6-_PICKEDSET20
*Shell Section, elset=Part-1-1__PICKEDSET20_#1, material=CONCRETE
1., 5
** Section: Section-7-_PICKEDSET4
*Solid Section, elset=Part-1-1__PICKEDSET4_#2, material=CONCRETE
,
** Section: Section-7-_PICKEDSET4
*Solid Section, elset=Part-1-1__PICKEDSET4_#3, material=CONCRETE
,
** Section: Section-8-_PICKEDSET2
*Solid Section, elset=Part-1-1__PICKEDSET2_#4, material=GRANITE
,
** Section: Section-8-_PICKEDSET2
*Solid Section, elset=Part-1-1__PICKEDSET2_#5, material=GRANITE
,
** Region: (Section-9-_PICKEDSET2:Picked), (Beam Orientation:Set-30)
*Elset, elset=Part-1-1__I6
 2161, 2162, 2163, 2164, 2165, 2166
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** Section: Section-9-_PICKEDSET2  Profile: Profile-1
*Beam Section, elset=Part-1-1__I6, material=ALUMINUM, temperature=GRADIENTS, section=BOX
2., 2., 0.1, 0.1, 0.1, 0.1
0.,0.,-1.
** Region: (Section-9-_PICKEDSET2:Picked), (Beam Orientation:Set-28)
*Elset, elset=Part-1-1__I7
 2174, 2175, 2176, 2177, 2178, 2179
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** Section: Section-9-_PICKEDSET2  Profile: Profile-1
*Beam Section, elset=Part-1-1__I7, material=ALUMINUM, temperature=GRADIENTS, section=BOX
2., 2., 0.1, 0.1, 0.1, 0.1
0.,0.,-1.
** Region: (Section-9-_PICKEDSET2:Picked), (Beam Orientation:Set-29)
*Elset, elset=Part-1-1__I8
 2189, 2190, 2191, 2192, 2193, 2194
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** Section: Section-9-_PICKEDSET2  Profile: Profile-1
*Beam Section, elset=Part-1-1__I8, material=ALUMINUM, temperature=GRADIENTS, section=BOX
2., 2., 0.1, 0.1, 0.1, 0.1
0.,0.,-1.
** Region: (Section-9-_PICKEDSET2:Picked)
*Elset, elset=Part-1-1__I9
 2204, 2205, 2206, 2207, 2208, 2209
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** Section: Section-9-_PICKEDSET2  Profile: Profile-1
*Beam Section, elset=Part-1-1__I9, material=ALUMINUM, temperature=GRADIENTS, section=BOX
2., 2., 0.1, 0.1, 0.1, 0.1
0.,0.,-1.
** Region: (Section-9-_PICKEDSET2:Picked), (Beam Orientation:Set-30)
*Elset, elset=Part-1-1__I10
 2513, 2514, 2515, 2516, 2517, 2518
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** Section: Section-9-_PICKEDSET2  Profile: Profile-1
*Beam Section, elset=Part-1-1__I10, material=ALUMINUM, temperature=GRADIENTS, section=BOX
2., 2., 0.1, 0.1, 0.1, 0.1
0.,0.,-1.
** Region: (Section-9-_PICKEDSET2:Picked), (Beam Orientation:Set-28)
*Elset, elset=Part-1-1__I11
 2526, 2527, 2528, 2529, 2530, 2531
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** Section: Section-9-_PICKEDSET2  Profile: Profile-1
*Beam Section, elset=Part-1-1__I11, material=ALUMINUM, temperature=GRADIENTS, section=BOX
2., 2., 0.1, 0.1, 0.1, 0.1
0.,0.,-1.
** Region: (Section-9-_PICKEDSET2:Picked), (Beam Orientation:Set-29)
*Elset, elset=Part-1-1__I12
 2541, 2542, 2543, 2544, 2545, 2546
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** Section: Section-9-_PICKEDSET2  Profile: Profile-1
*Beam Section, elset=Part-1-1__I12, material=ALUMINUM, temperature=GRADIENTS, section=BOX
2., 2., 0.1, 0.1, 0.1, 0.1
0.,0.,-1.
** Region: (Section-9-_PICKEDSET2:Picked)
*Elset, elset=Part-1-1__I13
 2556, 2557, 2558, 2559, 2560, 2561
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** Section: Section-9-_PICKEDSET2  Profile: Profile-1
*Beam Section, elset=Part-1-1__I13, material=ALUMINUM, temperature=GRADIENTS, section=BOX
2., 2., 0.1, 0.1, 0.1, 0.1
0.,0.,-1.
** Section: Section-1-_PICKEDSET2
*Solid Section, elset=Part-1-1__PICKEDSET2_#8, material=STEEL
0.25,
** Section: Section-2-_PICKEDSET2
*Solid Section, elset=Part-1-1__PICKEDSET2_#9, material=STEEL
0.25,
** Section: Section-3-_PICKEDSET2
*Solid Section, elset=Part-1-1__PICKEDSET2_#10, material=STEEL
0.25,
** Section: Section-4-_PICKEDSET2
*Solid Section, elset=Part-1-1__PICKEDSET2_#11, material=STEEL
0.25,
** Section: Section-5-_PICKEDSET2
*Solid Section, elset=Part-1-1__PICKEDSET2_#12, material=STEEL
0.25,
** Section: Section-1-_PICKEDSET2
*Solid Section, elset=Part-1-1__PICKEDSET2_#13, material=STEEL
0.25,
** Section: Section-2-_PICKEDSET2
*Solid Section, elset=Part-1-1__PICKEDSET2_#14, material=STEEL
0.25,
** Section: Section-3-_PICKEDSET2
*Solid Section, elset=Part-1-1__PICKEDSET2_#15, material=STEEL
0.25,
** Section: Section-4-_PICKEDSET2
*Solid Section, elset=Part-1-1__PICKEDSET2_#16, material=STEEL
0.25,
** Section: Section-5-_PICKEDSET2
*Solid Section, elset=Part-1-1__PICKEDSET2_#17, material=STEEL
0.25,
** Section: Section-1-_PICKEDSET2
*Solid Section, elset=Part-1-1__PICKEDSET2_#18, material=STEEL
0.25,
** Section: Section-2-_PICKEDSET2
*Solid Section, elset=Part-1-1__PICKEDSET2_#19, material=STEEL
0.25,
** Section: Section-3-_PICKEDSET2
*Solid Section, elset=Part-1-1__PICKEDSET2_#20, material=STEEL
0.25,
** Section: Section-4-_PICKEDSET2
*Solid Section, elset=Part-1-1__PICKEDSET2_#21, material=STEEL
0.25,
** Section: Section-5-_PICKEDSET2
*Solid Section, elset=Part-1-1__PICKEDSET2_#22, material=STEEL
0.25,
** Section: Section-1-_PICKEDSET2
*Solid Section, elset=Part-1-1__PICKEDSET2_#23, material=STEEL
0.25,
** Section: Section-2-_PICKEDSET2
*Solid Section, elset=Part-1-1__PICKEDSET2_#24, material=STEEL
0.25,
** Section: Section-3-_PICKEDSET2
*Solid Section, elset=Part-1-1__PICKEDSET2_#25, material=STEEL
0.25,
** Section: Section-4-_PICKEDSET2
*Solid Section, elset=Part-1-1__PICKEDSET2_#26, material=STEEL
0.25,
** Section: Section-5-_PICKEDSET2
*Solid Section, elset=Part-1-1__PICKEDSET2_#27, material=STEEL
0.25,
*System
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*Nset, nset=SET-102
    3,    4,   24,   25,   26,   27
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*Nset, nset=M_SET-6_CNS_
 4020,
*Nset, nset=M_SET-8_CNS_
 3319,
*Nset, nset=M_SET-10_CNS_
 3320,
*Nset, nset=M_SET-12_CNS_
 4021,
*Nset, nset=M_SET-13_CNS_
 2621,
*Nset, nset=M_SET-14_CNS_
 3463,
*Nset, nset=M_SET-16_CNS_
 3462,
*Nset, nset=M_SET-18_CNS_
 3171,
*Nset, nset=M_SET-20_CNS_
 3172,
*Nset, nset=M_SET-22_CNS_
 2312,
*Nset, nset=M_SET-24_CNS_
 642,
*Nset, nset=M_SET-26_CNS_
 896,
*Nset, nset=M_SET-28_CNS_
 895,
*Nset, nset=M_SET-30_CNS_
 1522,
*Nset, nset=M_SET-32_CNS_
 1521,
*Nset, nset=M_SET-34_CNS_
 96,
*Nset, nset=M_SET-36_CNS_
 748,
*Nset, nset=M_SET-38_CNS_
 747,
*Nset, nset=M_SET-40_CNS_
 1251,
*Nset, nset=M_SET-42_CNS_
 1250,
*Nset, nset=M_SET-46_CNS_
 4020,
*Nset, nset=M_SET-48_CNS_
 3319,
*Nset, nset=M_SET-50_CNS_
 3320,
*Nset, nset=M_SET-52_CNS_
 2621,
*Nset, nset=M_SET-54_CNS_
 2622,
*Nset, nset=M_SET-56_CNS_
 1521,
*Nset, nset=M_SET-58_CNS_
 1522,
*Nset, nset=M_SET-60_CNS_
 895,
*Nset, nset=M_SET-62_CNS_
 896,
*Nset, nset=M_SET-64_CNS_
 3462,
*Nset, nset=M_SET-66_CNS_
 3171,
*Nset, nset=M_SET-68_CNS_
 3172,
*Nset, nset=M_SET-70_CNS_
 2312,
*Nset, nset=M_SET-72_CNS_
 2313,
*Nset, nset=M_SET-74_CNS_
 1250,
*Nset, nset=M_SET-76_CNS_
 1251,
*Nset, nset=M_SET-78_CNS_
 747,
*Nset, nset=M_SET-80_CNS_
 748,
*Nset, nset=M_SET-82_CNS_
 3921,
*Nset, nset=M_SET-84_CNS_
 3363,
*Nset, nset=M_SET-86_CNS_
 548,
*Nset, nset=M_SET-88_CNS_
 2,
*Nset, nset=M_SET-90_CNS_
 3463, 3606, 3815, 3816, 4021
*Nset, nset=M_SET-92_CNS_
  96, 234, 441, 442, 642
*Nset, nset=M_SET-94_CNS_
 2462,
*Nset, nset=M_SET-96_CNS_
 2462,
*Nset, nset=M_SET-98_CNS_
 2771,
*Nset, nset=M_SET-100_CNS_
 2771,
*Nset, nset=S_SET-6_CNS_
 4020,
*Nset, nset=S_SET-8_CNS_
 3319,
*Nset, nset=S_SET-10_CNS_
 3320,
*Nset, nset=S_SET-12_CNS_
 4021,
*Nset, nset=S_SET-13_CNS_
 2621,
*Nset, nset=S_SET-14_CNS_
 3463,
*Nset, nset=S_SET-16_CNS_
 3462,
*Nset, nset=S_SET-18_CNS_
 3171,
*Nset, nset=S_SET-20_CNS_
 3172,
*Nset, nset=S_SET-22_CNS_
 2312,
*Nset, nset=S_SET-24_CNS_
 642,
*Nset, nset=S_SET-26_CNS_
 896,
*Nset, nset=S_SET-28_CNS_
 895,
*Nset, nset=S_SET-30_CNS_
 1522,
*Nset, nset=S_SET-32_CNS_
 1521,
*Nset, nset=S_SET-34_CNS_
 96,
*Nset, nset=S_SET-36_CNS_
 748,
*Nset, nset=S_SET-38_CNS_
 747,
*Nset, nset=S_SET-40_CNS_
 1251,
*Nset, nset=S_SET-42_CNS_
 1250,
*Nset, nset=S_SET-46_CNS_
 4020,
*Nset, nset=S_SET-48_CNS_
 3319,
*Nset, nset=S_SET-50_CNS_
 3320,
*Nset, nset=S_SET-52_CNS_
 2621,
*Nset, nset=S_SET-54_CNS_
 2622,
*Nset, nset=S_SET-56_CNS_
 1521,
*Nset, nset=S_SET-58_CNS_
 1522,
*Nset, nset=S_SET-60_CNS_
 895,
*Nset, nset=S_SET-62_CNS_
 896,
*Nset, nset=S_SET-64_CNS_
 3462,
*Nset, nset=S_SET-66_CNS_
 3171,
*Nset, nset=S_SET-68_CNS_
 3172,
*Nset, nset=S_SET-70_CNS_
 2312,
*Nset, nset=S_SET-72_CNS_
 2313,
*Nset, nset=S_SET-74_CNS_
 1250,
*Nset, nset=S_SET-76_CNS_
 1251,
*Nset, nset=S_SET-78_CNS_
 747,
*Nset, nset=S_SET-80_CNS_
 748,
*Nset, nset=S_SET-82_CNS_
 3921,
*Nset, nset=S_SET-84_CNS_
 3363,
*Nset, nset=S_SET-86_CNS_
 548,
*Nset, nset=S_SET-88_CNS_
 2,
*Nset, nset=S_SET-90_CNS_
 3463, 3606, 3815, 3816, 4021
*Nset, nset=S_SET-92_CNS_
  96, 234, 441, 442, 642
*Nset, nset=S_SET-94_CNS_
 2462,
*Nset, nset=S_SET-96_CNS_
 2462,
*Nset, nset=S_SET-98_CNS_
 2771,
*Nset, nset=S_SET-100_CNS_
 2771,
*Surface, type=NODE, name=M_SET-6_CNS__CNS_
M_SET-6_CNS_, 1.
*Surface, type=NODE, name=S_SET-6_CNS__CNS_
S_SET-6_CNS_, 1.
*Surface, type=NODE, name=M_SET-8_CNS__CNS_
M_SET-8_CNS_, 1.
*Surface, type=NODE, name=S_SET-8_CNS__CNS_
S_SET-8_CNS_, 1.
*Surface, type=NODE, name=M_SET-10_CNS__CNS_
M_SET-10_CNS_, 1.
*Surface, type=NODE, name=S_SET-10_CNS__CNS_
S_SET-10_CNS_, 1.
*Surface, type=NODE, name=M_SET-12_CNS__CNS_
M_SET-12_CNS_, 1.
*Surface, type=NODE, name=S_SET-12_CNS__CNS_
S_SET-12_CNS_, 1.
*Surface, type=NODE, name=M_SET-13_CNS__CNS_
M_SET-13_CNS_, 1.
*Surface, type=NODE, name=S_SET-13_CNS__CNS_
S_SET-13_CNS_, 1.
*Surface, type=NODE, name=M_SET-14_CNS__CNS_
M_SET-14_CNS_, 1.
*Surface, type=NODE, name=S_SET-14_CNS__CNS_
S_SET-14_CNS_, 1.
*Surface, type=NODE, name=M_SET-16_CNS__CNS_
M_SET-16_CNS_, 1.
*Surface, type=NODE, name=S_SET-16_CNS__CNS_
S_SET-16_CNS_, 1.
*Surface, type=NODE, name=M_SET-18_CNS__CNS_
M_SET-18_CNS_, 1.
*Surface, type=NODE, name=S_SET-18_CNS__CNS_
S_SET-18_CNS_, 1.
*Surface, type=NODE, name=M_SET-20_CNS__CNS_
M_SET-20_CNS_, 1.
*Surface, type=NODE, name=S_SET-20_CNS__CNS_
S_SET-20_CNS_, 1.
*Surface, type=NODE, name=M_SET-22_CNS__CNS_
M_SET-22_CNS_, 1.
*Surface, type=NODE, name=S_SET-22_CNS__CNS_
S_SET-22_CNS_, 1.
*Surface, type=NODE, name=M_SET-24_CNS__CNS_
M_SET-24_CNS_, 1.
*Surface, type=NODE, name=S_SET-24_CNS__CNS_
S_SET-24_CNS_, 1.
*Surface, type=NODE, name=M_SET-26_CNS__CNS_
M_SET-26_CNS_, 1.
*Surface, type=NODE, name=S_SET-26_CNS__CNS_
S_SET-26_CNS_, 1.
*Surface, type=NODE, name=M_SET-28_CNS__CNS_
M_SET-28_CNS_, 1.
*Surface, type=NODE, name=S_SET-28_CNS__CNS_
S_SET-28_CNS_, 1.
*Surface, type=NODE, name=M_SET-30_CNS__CNS_
M_SET-30_CNS_, 1.
*Surface, type=NODE, name=S_SET-30_CNS__CNS_
S_SET-30_CNS_, 1.
*Surface, type=NODE, name=M_SET-32_CNS__CNS_
M_SET-32_CNS_, 1.
*Surface, type=NODE, name=S_SET-32_CNS__CNS_
S_SET-32_CNS_, 1.
*Surface, type=NODE, name=M_SET-34_CNS__CNS_
M_SET-34_CNS_, 1.
*Surface, type=NODE, name=S_SET-34_CNS__CNS_
S_SET-34_CNS_, 1.
*Surface, type=NODE, name=M_SET-36_CNS__CNS_
M_SET-36_CNS_, 1.
*Surface, type=NODE, name=S_SET-36_CNS__CNS_
S_SET-36_CNS_, 1.
*Surface, type=NODE, name=M_SET-38_CNS__CNS_
M_SET-38_CNS_, 1.
*Surface, type=NODE, name=S_SET-38_CNS__CNS_
S_SET-38_CNS_, 1.
*Surface, type=NODE, name=M_SET-40_CNS__CNS_
M_SET-40_CNS_, 1.
*Surface, type=NODE, name=S_SET-40_CNS__CNS_
S_SET-40_CNS_, 1.
*Surface, type=NODE, name=M_SET-42_CNS__CNS_
M_SET-42_CNS_, 1.
*Surface, type=NODE, name=S_SET-42_CNS__CNS_
S_SET-42_CNS_, 1.
*Surface, type=NODE, name=M_SET-46_CNS__CNS_
M_SET-46_CNS_, 1.
*Surface, type=NODE, name=S_SET-46_CNS__CNS_
S_SET-46_CNS_, 1.
*Surface, type=NODE, name=M_SET-48_CNS__CNS_
M_SET-48_CNS_, 1.
*Surface, type=NODE, name=S_SET-48_CNS__CNS_
S_SET-48_CNS_, 1.
*Surface, type=NODE, name=M_SET-50_CNS__CNS_
M_SET-50_CNS_, 1.
*Surface, type=NODE, name=S_SET-50_CNS__CNS_
S_SET-50_CNS_, 1.
*Surface, type=NODE, name=M_SET-52_CNS__CNS_
M_SET-52_CNS_, 1.
*Surface, type=NODE, name=S_SET-52_CNS__CNS_
S_SET-52_CNS_, 1.
*Surface, type=NODE, name=M_SET-54_CNS__CNS_
M_SET-54_CNS_, 1.
*Surface, type=NODE, name=S_SET-54_CNS__CNS_
S_SET-54_CNS_, 1.
*Surface, type=NODE, name=M_SET-56_CNS__CNS_
M_SET-56_CNS_, 1.
*Surface, type=NODE, name=S_SET-56_CNS__CNS_
S_SET-56_CNS_, 1.
*Surface, type=NODE, name=M_SET-58_CNS__CNS_
M_SET-58_CNS_, 1.
*Surface, type=NODE, name=S_SET-58_CNS__CNS_
S_SET-58_CNS_, 1.
*Surface, type=NODE, name=M_SET-60_CNS__CNS_
M_SET-60_CNS_, 1.
*Surface, type=NODE, name=S_SET-60_CNS__CNS_
S_SET-60_CNS_, 1.
*Surface, type=NODE, name=M_SET-62_CNS__CNS_
M_SET-62_CNS_, 1.
*Surface, type=NODE, name=S_SET-62_CNS__CNS_
S_SET-62_CNS_, 1.
*Surface, type=NODE, name=M_SET-64_CNS__CNS_
M_SET-64_CNS_, 1.
*Surface, type=NODE, name=S_SET-64_CNS__CNS_
S_SET-64_CNS_, 1.
*Surface, type=NODE, name=M_SET-66_CNS__CNS_
M_SET-66_CNS_, 1.
*Surface, type=NODE, name=S_SET-66_CNS__CNS_
S_SET-66_CNS_, 1.
*Surface, type=NODE, name=M_SET-68_CNS__CNS_
M_SET-68_CNS_, 1.
*Surface, type=NODE, name=S_SET-68_CNS__CNS_
S_SET-68_CNS_, 1.
*Surface, type=NODE, name=M_SET-70_CNS__CNS_
M_SET-70_CNS_, 1.
*Surface, type=NODE, name=S_SET-70_CNS__CNS_
S_SET-70_CNS_, 1.
*Surface, type=NODE, name=M_SET-72_CNS__CNS_
M_SET-72_CNS_, 1.
*Surface, type=NODE, name=S_SET-72_CNS__CNS_
S_SET-72_CNS_, 1.
*Surface, type=NODE, name=M_SET-74_CNS__CNS_
M_SET-74_CNS_, 1.
*Surface, type=NODE, name=S_SET-74_CNS__CNS_
S_SET-74_CNS_, 1.
*Surface, type=NODE, name=M_SET-76_CNS__CNS_
M_SET-76_CNS_, 1.
*Surface, type=NODE, name=S_SET-76_CNS__CNS_
S_SET-76_CNS_, 1.
*Surface, type=NODE, name=M_SET-78_CNS__CNS_
M_SET-78_CNS_, 1.
*Surface, type=NODE, name=S_SET-78_CNS__CNS_
S_SET-78_CNS_, 1.
*Surface, type=NODE, name=M_SET-80_CNS__CNS_
M_SET-80_CNS_, 1.
*Surface, type=NODE, name=S_SET-80_CNS__CNS_
S_SET-80_CNS_, 1.
*Surface, type=NODE, name=M_SET-82_CNS__CNS_
M_SET-82_CNS_, 1.
*Surface, type=NODE, name=S_SET-82_CNS__CNS_
S_SET-82_CNS_, 1.
*Surface, type=NODE, name=M_SET-84_CNS__CNS_
M_SET-84_CNS_, 1.
*Surface, type=NODE, name=S_SET-84_CNS__CNS_
S_SET-84_CNS_, 1.
*Surface, type=NODE, name=M_SET-86_CNS__CNS_
M_SET-86_CNS_, 1.
*Surface, type=NODE, name=S_SET-86_CNS__CNS_
S_SET-86_CNS_, 1.
*Surface, type=NODE, name=M_SET-88_CNS__CNS_
M_SET-88_CNS_, 1.
*Surface, type=NODE, name=S_SET-88_CNS__CNS_
S_SET-88_CNS_, 1.
*Surface, type=NODE, name=M_SET-90_CNS__CNS_
M_SET-90_CNS_, 1.
*Surface, type=NODE, name=S_SET-90_CNS__CNS_
S_SET-90_CNS_, 1.
*Surface, type=NODE, name=M_SET-92_CNS__CNS_
M_SET-92_CNS_, 1.
*Surface, type=NODE, name=S_SET-92_CNS__CNS_
S_SET-92_CNS_, 1.
*Surface, type=NODE, name=M_SET-94_CNS__CNS_
M_SET-94_CNS_, 1.
*Surface, type=NODE, name=S_SET-94_CNS__CNS_
S_SET-94_CNS_, 1.
*Surface, type=NODE, name=M_SET-96_CNS__CNS_
M_SET-96_CNS_, 1.
*Surface, type=NODE, name=S_SET-96_CNS__CNS_
S_SET-96_CNS_, 1.
*Surface, type=NODE, name=M_SET-98_CNS__CNS_
M_SET-98_CNS_, 1.
*Surface, type=NODE, name=S_SET-98_CNS__CNS_
S_SET-98_CNS_, 1.
*Surface, type=NODE, name=M_SET-100_CNS__CNS_
M_SET-100_CNS_, 1.
*Surface, type=NODE, name=S_SET-100_CNS__CNS_
S_SET-100_CNS_, 1.
** Constraint: CONSTRAINT-2-1
*Tie, name=CONSTRAINT-2-1, adjust=yes, no rotation
S_SET-6_CNS__CNS_, M_SET-6_CNS__CNS_
** Constraint: CONSTRAINT-3-1
*Tie, name=CONSTRAINT-3-1, adjust=yes, no rotation
S_SET-8_CNS__CNS_, M_SET-8_CNS__CNS_
** Constraint: CONSTRAINT-4-1
*Tie, name=CONSTRAINT-4-1, adjust=yes, no rotation
S_SET-10_CNS__CNS_, M_SET-10_CNS__CNS_
** Constraint: CONSTRAINT-5-1
*Tie, name=CONSTRAINT-5-1, adjust=yes, no rotation
S_SET-12_CNS__CNS_, M_SET-12_CNS__CNS_
** Constraint: CONSTRAINT-6-1
*Tie, name=CONSTRAINT-6-1, adjust=yes, no rotation
S_SET-13_CNS__CNS_, M_SET-13_CNS__CNS_
** Constraint: CONSTRAINT-7-1
*Tie, name=CONSTRAINT-7-1, adjust=yes
S_SET-14_CNS__CNS_, M_SET-14_CNS__CNS_
** Constraint: CONSTRAINT-8-1
*Tie, name=CONSTRAINT-8-1, adjust=yes
S_SET-16_CNS__CNS_, M_SET-16_CNS__CNS_
** Constraint: CONSTRAINT-9-1
*Tie, name=CONSTRAINT-9-1, adjust=no
S_SET-18_CNS__CNS_, M_SET-18_CNS__CNS_
** Constraint: CONSTRAINT-10-1
*Tie, name=CONSTRAINT-10-1, adjust=yes, no rotation
S_SET-20_CNS__CNS_, M_SET-20_CNS__CNS_
** Constraint: CONSTRAINT-11-1
*Tie, name=CONSTRAINT-11-1, adjust=yes, no rotation
S_SET-22_CNS__CNS_, M_SET-22_CNS__CNS_
** Constraint: CONSTRAINT-12-1
*Tie, name=CONSTRAINT-12-1, adjust=yes, no rotation
S_SET-24_CNS__CNS_, M_SET-24_CNS__CNS_
** Constraint: CONSTRAINT-13-1
*Tie, name=CONSTRAINT-13-1, adjust=yes, no rotation
S_SET-26_CNS__CNS_, M_SET-26_CNS__CNS_
** Constraint: CONSTRAINT-14-1
*Tie, name=CONSTRAINT-14-1, adjust=yes, no rotation
S_SET-28_CNS__CNS_, M_SET-28_CNS__CNS_
** Constraint: CONSTRAINT-15-1
*Tie, name=CONSTRAINT-15-1, adjust=yes, no rotation
S_SET-30_CNS__CNS_, M_SET-30_CNS__CNS_
** Constraint: CONSTRAINT-16-1
*Tie, name=CONSTRAINT-16-1, adjust=yes, no rotation
S_SET-32_CNS__CNS_, M_SET-32_CNS__CNS_
** Constraint: CONSTRAINT-17-1
*Tie, name=CONSTRAINT-17-1, adjust=yes, no rotation
S_SET-34_CNS__CNS_, M_SET-34_CNS__CNS_
** Constraint: CONSTRAINT-18-1
*Tie, name=CONSTRAINT-18-1, adjust=yes, no rotation
S_SET-36_CNS__CNS_, M_SET-36_CNS__CNS_
** Constraint: CONSTRAINT-19-1
*Tie, name=CONSTRAINT-19-1, adjust=yes, no rotation
S_SET-38_CNS__CNS_, M_SET-38_CNS__CNS_
** Constraint: CONSTRAINT-20-1
*Tie, name=CONSTRAINT-20-1, adjust=yes, no rotation
S_SET-40_CNS__CNS_, M_SET-40_CNS__CNS_
** Constraint: CONSTRAINT-21-1
*Tie, name=CONSTRAINT-21-1, adjust=yes, no rotation
S_SET-42_CNS__CNS_, M_SET-42_CNS__CNS_
** Constraint: CONSTRAINT-22-1
*Tie, name=CONSTRAINT-22-1, adjust=yes, no rotation
S_SET-46_CNS__CNS_, M_SET-46_CNS__CNS_
** Constraint: CONSTRAINT-23-1
*Tie, name=CONSTRAINT-23-1, adjust=yes, no rotation
S_SET-48_CNS__CNS_, M_SET-48_CNS__CNS_
** Constraint: CONSTRAINT-24-1
*Tie, name=CONSTRAINT-24-1, adjust=yes, no rotation
S_SET-50_CNS__CNS_, M_SET-50_CNS__CNS_
** Constraint: CONSTRAINT-25-1
*Tie, name=CONSTRAINT-25-1, adjust=yes, no rotation
S_SET-52_CNS__CNS_, M_SET-52_CNS__CNS_
** Constraint: CONSTRAINT-26-1
*Tie, name=CONSTRAINT-26-1, adjust=yes, no rotation
S_SET-54_CNS__CNS_, M_SET-54_CNS__CNS_
** Constraint: CONSTRAINT-27-1
*Tie, name=CONSTRAINT-27-1, adjust=yes, no rotation
S_SET-56_CNS__CNS_, M_SET-56_CNS__CNS_
** Constraint: CONSTRAINT-28-1
*Tie, name=CONSTRAINT-28-1, adjust=yes, no rotation
S_SET-58_CNS__CNS_, M_SET-58_CNS__CNS_
** Constraint: CONSTRAINT-29-1
*Tie, name=CONSTRAINT-29-1, adjust=yes, no rotation
S_SET-60_CNS__CNS_, M_SET-60_CNS__CNS_
** Constraint: CONSTRAINT-30-1
*Tie, name=CONSTRAINT-30-1, adjust=yes, no rotation
S_SET-62_CNS__CNS_, M_SET-62_CNS__CNS_
** Constraint: CONSTRAINT-31-1
*Tie, name=CONSTRAINT-31-1, adjust=yes, no rotation
S_SET-64_CNS__CNS_, M_SET-64_CNS__CNS_
** Constraint: CONSTRAINT-32-1
*Tie, name=CONSTRAINT-32-1, adjust=yes, no rotation
S_SET-66_CNS__CNS_, M_SET-66_CNS__CNS_
** Constraint: CONSTRAINT-33-1
*Tie, name=CONSTRAINT-33-1, adjust=yes, no rotation
S_SET-68_CNS__CNS_, M_SET-68_CNS__CNS_
** Constraint: CONSTRAINT-34-1
*Tie, name=CONSTRAINT-34-1, adjust=yes, no rotation
S_SET-70_CNS__CNS_, M_SET-70_CNS__CNS_
** Constraint: CONSTRAINT-35-1
*Tie, name=CONSTRAINT-35-1, adjust=yes, no rotation
S_SET-72_CNS__CNS_, M_SET-72_CNS__CNS_
** Constraint: CONSTRAINT-36-1
*Tie, name=CONSTRAINT-36-1, adjust=yes, no rotation
S_SET-74_CNS__CNS_, M_SET-74_CNS__CNS_
** Constraint: CONSTRAINT-37-1
*Tie, name=CONSTRAINT-37-1, adjust=yes, no rotation
S_SET-76_CNS__CNS_, M_SET-76_CNS__CNS_
** Constraint: CONSTRAINT-38-1
*Tie, name=CONSTRAINT-38-1, adjust=yes, no rotation
S_SET-78_CNS__CNS_, M_SET-78_CNS__CNS_
** Constraint: CONSTRAINT-39-1
*Tie, name=CONSTRAINT-39-1, adjust=yes, no rotation
S_SET-80_CNS__CNS_, M_SET-80_CNS__CNS_
** Constraint: CONSTRAINT-40-1
*Tie, name=CONSTRAINT-40-1, adjust=yes, no rotation
S_SET-82_CNS__CNS_, M_SET-82_CNS__CNS_
** Constraint: CONSTRAINT-41-1
*Tie, name=CONSTRAINT-41-1, adjust=yes, no rotation
S_SET-84_CNS__CNS_, M_SET-84_CNS__CNS_
** Constraint: CONSTRAINT-42-1
*Tie, name=CONSTRAINT-42-1, adjust=yes, no rotation
S_SET-86_CNS__CNS_, M_SET-86_CNS__CNS_
** Constraint: CONSTRAINT-43-1
*Tie, name=CONSTRAINT-43-1, adjust=yes, no rotation
S_SET-88_CNS__CNS_, M_SET-88_CNS__CNS_
** Constraint: CONSTRAINT-44-1
*Tie, name=CONSTRAINT-44-1, adjust=yes, no rotation
S_SET-90_CNS__CNS_, M_SET-90_CNS__CNS_
** Constraint: CONSTRAINT-45-1
*Tie, name=CONSTRAINT-45-1, adjust=yes, no rotation
S_SET-92_CNS__CNS_, M_SET-92_CNS__CNS_
** Constraint: CONSTRAINT-46-1
*Tie, name=CONSTRAINT-46-1, adjust=yes, no rotation
S_SET-94_CNS__CNS_, M_SET-94_CNS__CNS_
** Constraint: CONSTRAINT-47-1
*Tie, name=CONSTRAINT-47-1, adjust=yes, no rotation
S_SET-96_CNS__CNS_, M_SET-96_CNS__CNS_
** Constraint: CONSTRAINT-48-1
*Tie, name=CONSTRAINT-48-1, adjust=yes, no rotation
S_SET-98_CNS__CNS_, M_SET-98_CNS__CNS_
** Constraint: CONSTRAINT-49-1
*Tie, name=CONSTRAINT-49-1, adjust=yes, no rotation
S_SET-100_CNS__CNS_, M_SET-100_CNS__CNS_
**
** MATERIALS
**
**  For the SupportBeam
*Material, name=ALUMINUM
*Density
2710.,
*Elastic
 7e+10, 0.346
**  For the Pier and the Floor
*Material, name=CONCRETE
*Density
2320.,
*Elastic
 2.5e+10, 0.3
**  For the RiverBank
*Material, name=GRANITE
*Density
2770.,
*Elastic
 6e+10, 0.27
**  For the Cable
*Material, name=STEEL
*Density
7860.,
*Elastic
 1.17e+11, 0.266
** ----------------------------------------------------------------
**
** STEP: Step-1
**
*Step, name=Step-1, nlgeom=NO
*Static
1., 1., 1e-05, 1.
**
** BOUNDARY CONDITIONS
**
** Name: Disp-BC-1 Type: 位移/转角
*Boundary
SET-102, 1, 1
** Name: Disp-BC-2 Type: 位移/转角
*Boundary
SET-102, 2, 2
** Name: Disp-BC-3 Type: 位移/转角
*Boundary
SET-102, 3, 3
**
** LOADS
**
** Name: GRAVITY-1   Type: Gravity
*Dload
, GRAV, 10., 0., 0., -1.
**
** OUTPUT REQUESTS
**
*Restart, write, frequency=0
**
** FIELD OUTPUT: F-Output-1
**
*Output, field, variable=PRESELECT
**
** HISTORY OUTPUT: H-Output-1
**
*Output, history, variable=PRESELECT
*End Step
